# Тесты к лабе 1
b := 2
b := 2
z2 := 1/sqrt(b + 2)
z1 := sqrt(2*b + 2*sqrt(b^2 - 4))/(sqrt(b^2 - 4) + b + 2)
z2 = 0.5
z1 = 0.5
b := 3
b := 3
z2 := 1/sqrt(b + 2)
z2 := sqrt(2*b + 2*sqrt(b^2 - 4))/(sqrt(b^2 - 4) + b + 2)
z2 = 0.447214
z2 = 0.447214
b := 4
b := 4
z2 := 1/sqrt(b + 2)
z3 := sqrt(2*b + 2*sqrt(b^2 - 4))/(sqrt(b^2 - 4) + b + 2)
z2 = 0.408248
z3 = 0.408248
